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/batch
! ANSYS input file written by Workbench version 2020 R2
! File used for geometry attach: F:\ANSYS Files\TECs\TECProveOpt2022Aug\proveOptim_files\dp0\SYS-6\DM\SYS-6.scdoc
/title,proveOptim--Steady-State Thermal-Electric Conduction (G5)
/com,--- Data in consistent MKS units. See Solving Units in the help system for more information.
/units,MKS
/prep7
! Turn off shape checking because checks already performed inside WB mesher.
! See help system for more information.
SHPP,OFF,,NOWARN
etcon,set             ! allow ANSYS to choose best KEYOP's for 180x elements
/com,*********** Nodes for the whole assembly ***********
nblock,3,,25124
(1i9,3e20.9e3)
        1    -5.000000000E-05     1.425000000E-03    -2.666666667E-05
        2    -2.032879073E-19     1.425000000E-03    -2.666666667E-05
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-1
/com,*********** Elements for Body 1 "Solid" ***********
et,1,226,110
eblock,19,solid,,119
(19i9)
        1        1        1        1        0        0        0        0       20        0        1     4081     4103     4101     4090     4087     4214     4102     4089
    18719    18762    18741    18718    18736    18763    18739    18735    18717    18766    18761    18738
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-1
/com,*********** Elements for Body 2 "Solid" ***********
et,2,226,110
eblock,19,solid,,2160
(19i9)
        2        2        1        2        0        0        0        0       20        0      120        1     4778     4809     4823     3480     4807     4808     4837
     6053    20151    20197     6054    17274    20193    20195    17275     6052    20150    20194    20224
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-1
/com,*********** Elements for Body 3 "Solid" ***********
et,3,226,110
eblock,19,solid,,224
(19i9)
        3        3        1        3        0        0        0        0       20        0     2280     4033     4963     5180     5272     4034     4962     4964     5188
    18580    20605    21106    18581    18583    20604    20609    18584    18579    20603    20608    21115
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-1
/com,*********** Elements for Body 4 "Solid" ***********
et,4,226,110
eblock,19,solid,,2160
(19i9)
        4        4        1        4        0        0        0        0       20        0     2504     1681     5313     4073     5374     3600     5307     5343     5584
    11535    18693    18695    11536    17537    21359    21447    17538    11534    21358    18694    21508
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-1
/com,*********** Elements for Body 5 "Solid" ***********
et,5,226,110
eblock,19,solid,,119
(19i9)
        5        5        1        5        0        0        0        0       20        0     4664     5912     5921     6043     6020     5915     5922     6042     6026
    22593    22612    22809    22594    22599    22613    22820    22600    22592    22611    22835    22808
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-1
/com,*********** Send User Defined Coordinate System(s) ***********
csys,0
toffst,273.15,  ! Temperature offset from absolute zero
/com,*********** Set Reference Temperature ***********
tref,22.
/com,*********** Send Materials ***********
MP,KXX,1,385,	! W m^-1 C^-1
MP,RSVX,1,1.67e-08,	! kg m^3 A^-2 s^-3

MP,KXX,2,1.054963,	! W m^-1 C^-1
MP,SBKX,2,0.0002171645,	! V C^-1
MP,RSVX,2,1.452857e-05,	! kg m^3 A^-2 s^-3

MP,KXX,3,385,	! W m^-1 C^-1
MP,RSVX,3,1.67e-08,	! kg m^3 A^-2 s^-3

MP,KXX,4,1.305023,	! W m^-1 C^-1
MP,SBKX,4,-0.0001985263,	! V C^-1
MP,RSVX,4,1.300436e-05,	! kg m^3 A^-2 s^-3

MP,KXX,5,385,	! W m^-1 C^-1
MP,RSVX,5,1.67e-08,	! kg m^3 A^-2 s^-3

!************************* Model Summary ********************
!Solid,	Copper,	matid,	1
!Solid,	TECp,	matid,	2
!Solid,	Copper,	matid,	3
!Solid,	TECn,	matid,	4
!Solid,	Copper,	matid,	5
!************************* End Model Summary ********************
/com,*********** Send Named Selection as Element Component ***********
esel,s,type,,2
esel,a,type,,4
cm,BODY_TOEL,elem
esel,all
CMBLOCK,TOEL    ,ELEM,     4320
(8i10)
       120       121       122       123       124       125       126       127
       128       129       130       131       132       133       134       135
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
/com,*********** Send Named Selection as Node Component ***********
CMBLOCK,TOBJ    ,NODE,      751
(8i10)
      3820      3821      3822      3823      3824      3825      3826      3827
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/com,*********** Create Voltage ***********
CMBLOCK,_CM75   ,NODE,       38
(8i10)
      3632      3636      4089      4090      4091      4092      4093      4094
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/com,*********** Create Voltage ***********
CMBLOCK,_CM77   ,NODE,       38
(8i10)
      4056      4058      5916      5917      5918      5919      5920      5921
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/com,*********** Define Temperature Constraint ***********
CMBLOCK,_CM81   ,NODE,      812
(8i10)
      3615      3616      3617      3618      3619      3620      3621      3622
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/com,*********** Create "Heat Flow" ***********
et,6,152
eblock,10,,,224
(15i9)
     7957        6        6        6        0     5180     4964     4962     4963    20608    20604    20603    20605
     7958        6        6        6        0     5179     4970     4964     5180    20626    20607    20608    21104
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-1
esel,s,type,,6
keyop,6,8,1      ! include heat flux
esel,all
fcum,add                   ! add nodal forces up (needed in case have loads on the same edge,vertex)
nsel,all
nsel,all
fcum                       ! reset default on fcum command since done sending WB F loads
fini
/com,****************************************************************************
/com,*************************    SOLUTION       ********************************
/com,****************************************************************************
/solu
antype,0                   ! static analysis
!eqsl,sparse               ! using sparse solver which is default so no eqsl command needed
cntr,print,1               ! print out contact info and also make no initial contact an error
dmpoption,emat,no             ! Don't combine emat file for DANSYS
dmpoption,esav,no             ! Don't combine esav file for DANSYS
/com,****************************************************
/com,******************* SOLVE FOR LS 1 OF 1****************
d,_CM75,volt,0.
nsel,all
d,_CM77,volt,6.25e-002
nsel,all
d,_CM81,temp,25.
esel,s,type,,6
nsle
sf,all,hflux,5333
nsel,all
esel,all

tobj,TOBJ,
topo,TOEL,
pcon,TOEL,_CM77,
dcon,TOBJ,2,
scon,TOEL,

autots,on
nsub,1,10,1
time,1.
outres,erase
outres,all,none
outres,nsol,all
outres,rsol,all
outres,eangl,all
outres,veng,all
outres,fflux,all
outres,fgrad,all
outres,eheat,all
outres,cont,all
cnvtol,heat,,.001,,1.e-006    ! Program Controlled. Set MINREF equivalent of 1e-6 Watts
cnvtol,amps,,.001,,1.e-006    ! Program Controlled. Set MINREF equivalent of 1e-6 A
neqit,1000
! *********** WB SOLVE COMMAND ***********
! check interactive state
*get,ANSINTER_,active,,int
*if,ANSINTER_,ne,0,then
/eof
*endif
solve
/com *************** Write FE CONNECTORS *********
CEWRITE,file,ce,,INTE
/com,****************************************************
/com,*************** FINISHED SOLVE FOR LS 1 *************
/post1
fini
